# Calculate bispectrum descriptors on a 3D grid

# pass in values ngridx, ngridy, ngridz, twojmax, rcutfac, atom_config_fname
# using command-line -var option

# Initialize simulation

units		metal

read_data ${atom_config_fname}

mass * 1.0

# define grid compute and atom compute

group 		snapgroup type 1
variable 	rfac0 equal 0.99363
variable 	rmin0 equal 0
variable 	wj equal 1
variable 	wjlocal equal ${wj}-1.0e-15 # inject a bit of fuzz
variable 	radelem equal 0.5
variable 	bzero equal 0
variable 	quadratic equal 0

compute bgridlocal all sna/grid/local grid ${ngridx} ${ngridy} ${ngridz} ${rcutfac} ${rfac0} ${twojmax} ${radelem} ${wjlocal} rmin0 ${rmin0} bzeroflag ${bzero} quadraticflag ${quadratic} switchflag ${switch}

# is this important? or does it just need to be big enough?

variable rcutneigh equal 2.0*${rcutfac}*${radelem}

pair_style zero ${rcutneigh}
pair_coeff * *

# define output

thermo_modify norm yes

run 0
