# Calculate bispectrum descriptors on a 3D grid

# pass in values ngridx, ngridy, ngridz, twojmax, rcutfac, atom_config_fname
# using command-line -var option

# set up processor grid to match QE
${lammps_procs}

# Initialize simulation

units		metal

read_data ${atom_config_fname}

mass * 1.0

# is this important? or does it just need to be big enough?

variable 	radelem1 equal 0.5
variable 	radelem2 equal 0.5
variable 	radelem3 equal 0.5
variable rcutneigh equal 2.0*${rcutfac}*${radelem1}

pair_style zero ${rcutneigh}
pair_coeff * *

# set up plane cutoff values to evenly distribute grid points

${zbal}

# define grid compute and atom compute

group 		snapgroup type 1 2 3
variable 	rfac0 equal 0.99363
variable 	rmin0 equal 0
variable 	wj1local equal ${wj1}-1.0e-15 # inject a bit of fuzz
variable 	wj2local equal ${wj2}-1.0e-15 # inject a bit of fuzz
variable 	wj3local equal ${wj2}-1.0e-15 # inject a bit of fuzz
variable 	bzero equal 0
variable 	quadratic equal 0

compute bgridlocal all sna/grid/local grid ${ngridx} ${ngridy} ${ngridz} ${rcutfac} ${rfac0} ${twojmax} ${radelem1} ${radelem2} ${radelem3} ${wj1local} ${wj2local} ${wj3local} rmin0 ${rmin0} bzeroflag ${bzero} quadraticflag ${quadratic} switchflag ${switch}

thermo_modify norm yes

run 0
