# Calculate Gaussian atomic density descriptors on a 3D grid

# pass in values ngridx, ngridy, ngridz, sigma, atom_config_fname
# using command-line -var option

# set up processor grid to match QE
${lammps_procs}

# Initialize simulation

units		metal
read_data ${atom_config_fname}
mass * 1.0


# is this important? or does it just need to be big enough?
variable	radelem1 equal 0.5
variable	radelem2 equal 0.5
variable	radelem3 equal 0.5
variable rcutneigh equal 2.0*${rcutfac}*${radelem}

pair_style zero ${rcutneigh}
pair_coeff * *

# set up plane cutoff values to evenly distribute grid points
${zbal}


compute ggrid all gaussian/grid/local  grid ${ngridx} ${ngridy} ${ngridz}  ${rcutfac}  ${radelem1}  ${radelem2}  ${radelem3}  ${sigma1} ${sigma2} ${sigma3}

thermo_modify norm yes

run 0
